# [area: Властивості]
wf := "H2O"
HPTwf(p, T, wf) := PropsSI("H", "P", p/Pa, "T", T/K, wf)*J/kg
HPTwf(3 MPa, 400 K, wf) = 534.842 J*10^3/kg
DPTwf(p, T, wf) := PropsSI("D", "P", p/Pa, "T", T/K, wf)*kg/m^3
DPTwf(2 MPa, 400 K, wf) = 938.385 kg/m^3
TPHwf(p, h, wf) := PropsSI("T", "P", p/Pa, "H", h/(J/kg), wf)*K
TPHwf(0.5 kPa, 470.519*J*10^3/kg, wf) =  # error: Enthalpy out of range
TSVPwf(p, wf) := PropsSI("T", "P", p/Pa, "Q", 1, wf)*K
TSVPwf(0.116 MPa, wf) = 376.958 K
TSLPwf(p, wf) := PropsSI("T", "P", p/Pa, "Q", 0, wf)*K
TSLPwf(0.116 MPa, wf) = 376.958 K
PSVTwf(T, wf) := PropsSI("P", "T", T/K, "Q", 1, wf)*Pa
PSVTwf(300 K, wf) = 0.00353681 MPa
PSLTwf(T, wf) := PropsSI("P", "T", T/K, "Q", 0, wf)*Pa
PSLTwf(250 K, wf) =  # error: Temperature out of range
HSVTwf(T, wf) := PropsSI("H", "T", T/K, "Q", 1, wf)*J/kg
HSVTwf(250 K, wf) = J*10^3/kg  # error: Temperature out of range
HSLTwf(T, wf) := PropsSI("H", "T", T/K, "Q", 0, wf)*J/kg
HSLTwf(250 K, wf) = J*10^3/kg  # error: Temperature out of range
DSVTwf(T, wf) := PropsSI("D", "T", T/K, "Q", 1, wf)*kg/m^3
DSVTwf(300 K, wf) = 0.0255897 kg/m^3
DSLTwf(T, wf) := PropsSI("D", "T", T/K, "Q", 0, wf)*kg/m^3
LPTwf(p, T, wf) := PropsSI("L", "P", p/Pa, "T", T/K, wf)*W/(m*K)
LSVTwf(T, wf) := PropsSI("L", "T", T/K, "Q", 1, wf)*W/(m*K)
LSLTwf(T, wf) := PropsSI("L", "T", T/K, "Q", 0, wf)*W/(m*K)
# annotation to a formula above: Оределение оптимальных размеров здания с минимизацией теплопотерь
LSLTwf(300 K, wf) = 0.000609445 kW/(m*K)
VPTwf(p, T, wf) := PropsSI("V", "P", p/Pa, "T", T/K, wf)*(Pa*sec)
VSVTwf(T, wf) := PropsSI("V", "T", T/K, "Q", 1, wf)*(Pa*sec)
VSLTwf(T, wf) := PropsSI("V", "T", T/K, "Q", 0, wf)*(Pa*sec)
VSLTwf(300 K, wf) = 0.000853751 Pa*s
CpPTwf(p, T, wf) := PropsSI("C", "P", p/Pa, "T", T/K, wf)*J/(kg*K)
CpPTwf(1 MPa, 300 K, wf) = 4.1781*1000 J/(kg*K)
CpSVTwf(T, wf) := PropsSI("C", "T", T/K, "Q", 1, wf)*J/(kg*K)
CpSVTwf(300 K, wf) = 1.91408*1000 J/(kg*K)
CpSLTwf(T, wf) := PropsSI("C", "T", T/K, "Q", 0, wf)*J/(kg*K)
CpSLTwf(300 K, wf) = 4.18091*1000 J/(kg*K)
ISVTwf(T, wf) := PropsSI("I", "T", T/K, "Q", 1, wf)*N/m
ISVTwf(300 K, wf) = 0.0717693 N/m
ISLTwf(T, wf) := PropsSI("I", "T", T/K, "Q", 0, wf)*N/m
ISLTwf(300 K, wf) = 0.0717693 N/m
# Властивості повітря
AirHTPR(T, p, R) := HAPropsSI("H", "T", T/K, "P", p/Pa, "R", R)*J/kg
AirHTPR(300 K, 0.1 MPa, 0.5) = 55.6854 J*10^3/kg
AirTPHR(p, h, R) := HAPropsSI("T", "P", p/Pa, "H", h/(J/kg), "R", R)*K
AirTPHR(0.1 MPa, 100*J*10^3/kg, 0.5) = 312.714 K
AirWPTR(p, T, R) := HAPropsSI("W", "P", p/Pa, "T", T/K, "R", R)
AirWPTR(0.1 MPa, 250 K, 0.6) = 0.000285117
AirRPTR(p, T, w) := HAPropsSI("R", "P", p/Pa, "T", T/K, "W", w)
AirRPTR(0.1 MPa, 250 K, AirWPTR(0.1 MPa, 250 K, 0.6)) = 60 %
AirKTPR(T, p, R) := HAPropsSI("K", "T", T/K, "P", p/Pa, "R", R)*W/(m*K)
AirKTPR(330 K, 0.1 MPa, 0.5) = 28.2668 mW/(m*K)
AirMTPR(T, p, R) := HAPropsSI("M", "T", T/K, "P", p/Pa, "R", R)*Pa*sec
AirMTPR(330 K, 0.1 MPa, 0.5) = 1.93047e-5 Pa*s
AirCpTPR(T, p, R) := HAPropsSI("C", "T", T/K, "P", p/Pa, "R", R)*J/(kg*K)
AirCpTPR(330 K, 0.1 MPa, 0.5) = 1.12053*1000 J/(kg*K)
AirVTPR(T, p, R) := HAPropsSI("V", "T", T/K, "P", p/Pa, "R", R)*m^3/kg
AirVTPR(330 K, 0.1 MPa, 0.5) = 1.03656 m^3/kg
AirDTPR(T, p, R) := HAPropsSI("D", "T", T/K, "P", p/Pa, "R", R)*K
AirDTPR(330 K, 0.1 MPa, 0.5) = 316.066 K
°C(t) ≡ (t + 273.15)*K
CH4 := 88.8825
C2H6 := 5.0932
C3H8 := 1.3142
C4H10 := 0.1491 + 0.2370 = 0.3861
C5H12 := 0.0050 + 0.0677 + 0.0713 + 0.09 = 0.234
N2 := 1.6896
CO2 := 2.3921
O2 := 0.0083
CO := 0
H2 := 0
H2S := 0
CH4 + C2H6 + C3H8 + C4H10 + C5H12 + N2 + CO2 + O2 = 100
d_g := 10*gm/m^3
d_air := 13*gm/m^3
α := 1.3
V_0 := 0.0476*(0.5*CO + 0.5*H2 + 1.5*H2S + (1 + 4/4)*CH4 + (2 + 6/4)*C2H6 + (3 + 8/4)*C3H8 + (4 + 10/4)*C4H10 + (5 + 12/4)*C5H12 - O2)*m^3/m^3 = 9.83109
V_0,N2 := 0.79*V_0 + N2/100*m^3/m^3 = 7.78346
V_RO2 := 0.01*(CO2 + CO + H2S + 1*CH4 + 2*C2H6 + 3*C3H8 + 4*C4H10 + 5*C5H12)*m^3/m^3 = 1.08118
m_RO2 := (CO2 + 44*2/(28*2)*CO + 64*2/(34*2)*H2S + 44*1/(16*1)*CH4 + 2*C2H6 + 3*C3H8 + 4*C4H10 + 5*C5H12)*kg/kg = 263.662
V_0,H2O := 0.01*(H2S + H2 + 4/2*CH4 + 6/2*C2H6 + 8/2*C3H8 + 10/2*C4H10 + 12/2*C5H12 + 0.124*m^3/gm*d_g + 0.124*m^3/gm*d_air*V_0)*m^3/m^3 = 2.18724
V_H2O := V_0,H2O + 0.01*0.124*m^3/gm*d_air*(α - 1)*V_0 = 2.23478
V_dry,g := V_RO2 + V_0,N2 + (α - 1)*V_0 = 11.814
V_g := V_dry,g + V_H2O = 14.0487
r_RO2 := V_RO2/V_g = 0.0769592
r_H2O := V_H2O/V_g = 0.159073
r_0,N2 := V_0,N2/V_g = 0.554032
r_0 := ((α - 1)*V_0)/V_g = 0.209935
r_RO2 + r_H2O + r_0,N2 + r_0 = 1
p_H2O := r_H2O*0.1*MPa = 15907.3 Pa
T_s := TSLPwf(p_H2O, "H2O") = 55.1916 °C
μ_g := (44*r_RO2 + 18*r_H2O + 24*V_0,N2/V_g + 28.964*((α - 1)*V_0)/V_g)*kg/(1000 mol) = 25.6269 kg/(1000 mol)
m_RO2 := 0.1
m_H2O := 0.2
m_0,N2 := 0.3
m_0 := 0.4
Given
m_RO2 == r_RO2*(44*kg/(1000 mol))/(r_RO2*(44*kg/(1000 mol)) + r_H2O*(18*kg/(1000 mol)) + r_0,N2*(24*kg/(1000 mol)) + r_0*(28.964*kg/(1000 mol)))
m_H2O == r_H2O*(18*kg/(1000 mol))/(r_RO2*(44*kg/(1000 mol)) + r_H2O*(18*kg/(1000 mol)) + r_0,N2*(24*kg/(1000 mol)) + r_0*(28.964*kg/(1000 mol)))
m_0,N2 == r_0,N2*(24*kg/(1000 mol))/(r_RO2*(44*kg/(1000 mol)) + r_H2O*(18*kg/(1000 mol)) + r_0,N2*(24*kg/(1000 mol)) + r_0*(28.964*kg/(1000 mol)))
m_0 == r_0*(28.964*kg/(1000 mol))/(r_RO2*(44*kg/(1000 mol)) + r_H2O*(18*kg/(1000 mol)) + r_0,N2*(24*kg/(1000 mol)) + r_0*(28.964*kg/(1000 mol)))
[m_RO2; m_H2O; m_0,N2; m_0] := Find(m_RO2, m_H2O, m_0,N2, m_0) = [0.132135; 0.111731; 0.518861; 0.237273]
m_RO2 + m_H2O + m_0,N2 + m_0 = 1
M_RO2 := 101325 Pa*V_RO2/(8.314*J/(mol*K)/(44*kg/(1000 mol))*273.15*K) = 2.12254 kg/m^3
M_H2O := 101325 Pa*V_H2O/(8.314*J/(mol*K)/(18*kg/(1000 mol))*273.15*K) = 1.79479 kg/m^3
M_0,N2 := 101325 Pa*V_0,N2/(8.314*J/(mol*K)/(24*kg/(1000 mol))*273.15*K) = 8.33469 kg/m^3
M_0 := 101325 Pa*((α - 1)*V_0)/(8.314*J/(mol*K)/(28.964*kg/(1000 mol))*273.15*K) = 3.81142 kg/m^3
M := M_RO2 + M_H2O + M_0,N2 + M_0 = 16.0634 kg/m^3
ρ_g := μ_g/(22.4*m^3/(1000 mol)) = 1.14406 kg/m^3
V_g*ρ_g = 16.0726 kg/m^3
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Q_lower := 0.01*(CO*12.64 + H2*10.79 + H2S*23.37 + CH4*35.88 + C2H6*64.36 + C3H8*93.18 + C4H10*123.15 + C5H12*156.63)*10^6*J/m^3 = 37.2356*10^6*J/m^3
ΔQ_H2O := 18*kg/(1000 mol)/μ_g*r_H2O*(V_g*ρ_g)*(2500*(1000 J/kg)) = 4489512 Pa
Q_higher := Q_lower + ΔQ_H2O = 41.7251*10^6*J/m^3
38.36
Q_lower := 34.65*10^6*J/m^3
Q_higher := 36.872*10^6*J/m^3
36.872 = 36.872
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# Експериментальні дані
w_w := transpose([3.482, 3.510, 3.464, 3.32, 3.61, 3.48, 3.44, 3.45, 3.50, 3.51, 3.55, 3.42, 3.47, 3.48])*m^3/hr
T_supply := transpose([30, 35, 40, 45, 50, 55, 61, 65, 70, 75, 73, 71, 68, 66]) °C
T_ret := transpose([17, 22, 26, 33, 38, 43, 50, 54, 59, 64, 62, 60, 57, 56]) °C
V_n,g := transpose([5.7, 5.85, 6.35, 6.1, 6.1, 6.2, 5.9, 6.3, 6.35, 6.35, 6.3, 6.35, 5.95, 6.15])*m^3/hr
T_g,out := transpose([40.8, 46.7, 55.3, 60, 63.0, 67.7, 70.8, 77.2, 82, 85.7, 84.3, 82.3, 78.3, 77.4]) °C
Q_w,instr := transpose([55.2, 53.6, 57.8, 53.8, 58.5, 50.2, 44.3, 42.1, 51.6, 49, 44.8, 48.8, 60.7, 45])*kW
i := 0 .. 13
η[i] := ((T_supply[i] - T_ret[i])*(4180*J/(kg*K))*w_w[i]*(988*kg/m^3))/(V_n,g[i]*Q_higher)
Q[i] := (T_supply[i] - T_ret[i])*(4180*J/(kg*K))*w_w[i]*(988*kg/m^3)
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cυ_RO2(T) :=
    vT ← transpose([273.15 + 100, 273.15 + 200, 273.15 + 300, 273.15 + 400, 273.15 + 500, 273.15 + 600, 273.15 + 700, 273.15 + 800, 273.15 + 900, 273.15 + 1000, 273.15 + 1100, 273.15 + 1200, 273.15 + 1300, 273.15 + 1400, 273.15 + 1500, 273.15 + 1600, 273.15 + 1700])
    vP ← transpose([170, 359, 561, 774, 999, 1226, 1466, 1709, 1957, 2209, 2465, 2726, 2986, 3251, 3515, 3780, 4049])
    if(min(vT) ≤ T/K ≤ max(vT), interp(cspline(vT, vP), vT, vP, T/K)*(1000 J/m^3), "T is out of the Range")
cυ_N2(T) :=
    vT ← transpose([273.15 + 100, 273.15 + 200, 273.15 + 300, 273.15 + 400, 273.15 + 500, 273.15 + 600, 273.15 + 700, 273.15 + 800, 273.15 + 900, 273.15 + 1000, 273.15 + 1100, 273.15 + 1200, 273.15 + 1300, 273.15 + 1400, 273.15 + 1500, 273.15 + 1600, 273.15 + 1700])
    vP ← transpose([130, 261, 393, 528, 667, 806, 949, 1096, 1247, 1398, 1550, 1701, 1856, 2016, 2171, 2331, 2490])
    if(min(vT) ≤ T/K ≤ max(vT), interp(cspline(vT, vP), vT, vP, T/K)*(1000 J/m^3), "T is out of the Range")
cυ_H2O(T) :=
    vT ← transpose([273.15 + 100, 273.15 + 200, 273.15 + 300, 273.15 + 400, 273.15 + 500, 273.15 + 600, 273.15 + 700, 273.15 + 800, 273.15 + 900, 273.15 + 1000, 273.15 + 1100, 273.15 + 1200, 273.15 + 1300, 273.15 + 1400, 273.15 + 1500, 273.15 + 1600, 273.15 + 1700])
    vP ← transpose([151, 305, 464, 628, 797, 970, 1151, 1340, 1529, 1730, 1932, 2138, 2352, 2566, 2789, 3011, 3238])
    if(min(vT) ≤ T/K ≤ max(vT), interp(cspline(vT, vP), vT, vP, T/K)*(1000 J/m^3), "T is out of the Range")
cυ_air(T) :=
    vT ← transpose([273.15 + 20, 273.15 + 50, 273.15 + 80, 273.15 + 100, 273.15 + 200, 273.15 + 300, 273.15 + 400, 273.15 + 500, 273.15 + 600, 273.15 + 700, 273.15 + 800, 273.15 + 900, 273.15 + 1000, 273.15 + 1100, 273.15 + 1200, 273.15 + 1300, 273.15 + 1400, 273.15 + 1500, 273.15 + 1600, 273.15 + 1700])
    vP ← transpose([26, 65.058, 104, 133, 267, 404, 543, 686, 832, 982, 1134, 1285, 1440, 1600, 1760, 1919, 2083, 2247, 2411, 2574])
    if(min(vT) ≤ T/K ≤ max(vT), interp(cspline(vT, vP), vT, vP, T/K)*(1000 J/m^3), "T is out of the Range")
T_var := (273.15 + 50)*K, (273.15 + 101)*K .. (273.15 + 1700)*K
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(HPTwf(0.1 MPa, (200 + 273.15)*K, "N2") - HPTwf(0.1 MPa, (100 + 273.15)*K, "N2"))*28/22.4*kg/m^3 = 130.902*1000 J/m^3
(HPTwf(0.1 MPa, (200 + 273.15)*K, "CO2") - HPTwf(0.1 MPa, (100 + 273.15)*K, "CO2"))*44/22.4*kg/m^3 = 188.469*1000 J/m^3
(AirHTPR((100 + 273.15)*K, 0.1 MPa, 0) - AirHTPR((50 + 273.15)*K, 0.1 MPa, 0))*(29/22.4*kg/m^3) = 65.3227*1000 J/m^3
(HPTwf(0.1 MPa, (200 + 273.15)*K, "H2O") - HPTwf(0.1 MPa, (100 + 273.15)*K, "H2O"))*18/22.4*kg/m^3 = 160.461*1000 J/m^3
I_0(T) := V_RO2*HPTwf(0.1 MPa, T, "CO2")*44/22.4*kg/m^3 + V_0,N2*HPTwf(0.1 MPa, T, "N2")*28/22.4*kg/m^3 + V_H2O*HPTwf(0.1 MPa, T, "H2O")*18/22.4*kg/m^3
I(T) := I_0(T) + (α - 1)*V_0*cυ_air(T)
I_out(T) := I_0(T) + (α - 1)*V_0*(AirHTPR(T, 0.1 MPa, 0)*(28.96/22.4*kg/m^3))
AirHTPR((300 + 273.15)*K, 0.1 MPa, 0)*(28.964/22.4*kg/m^3) = 395.643*1000 J/m^3
cυ_air((300 + 273.15)*K) = 404*1000 J/m^3
n := 8
T_g,in := (1100 + 273.15)*K
T_g,out[n] = 82 °C
T_supply[n] = 70 °C
T_ret[n] = 59 °C
w_w[n] = 3.5 m^3/hr
V_n,g[n] = 6.35 m^3/hr
Q_w[n] := (T_supply[n] - T_ret[n])*(4180*J/(kg*K))*w_w[n]*(988*kg/m^3)
Q_w[n] = 44.1663 kW
Q_g[n] := (I(T_g,in) - I(T_g,out[n]))*V_n,g[n]
Q_g[n] = 46.4464 kW
n_1 := 0, 1 .. 13
Q_w[n_1] := (T_supply[n_1] - T_ret[n_1])*(4180*J/(kg*K))*w_w[n_1]*(988*kg/m^3)
Q_g[n_1] := (I(T_g,in) - I(T_g,out[n_1]))*V_n,g[n_1]
P_w[n_1] :=
    (T_supply[n_1] - T_ret[n_1])*(4180*J/(kg*K))*w_w[n_1]*(988*kg/m^3) if T_ret[n_1] > (55 + 273.15)*K
    NaN otherwise
P_g[n_1] :=
    (I(T_g,in) - I(T_g,out[n_1]))*V_n,g[n_1] if T_ret[n_1] > (55 + 273.15)*K
    NaN otherwise
P_g_cond[n_1] :=
    Q_w[n_1] - Q_g[n_1] if T_ret[n_1] < (54 + 273.15)*K
    NaN otherwise
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D_out := 225 mm
D_in := 180 mm
L := π*((D_out + D_in)/2)*4 = 2.54469 m
s := (3.5*10^-4*m^3)/L = 0.000137541 m^2
a := (D_out - D_in)/2 - 2 mm = 20.5 mm
b := 7 mm - 1 mm - 2 mm = 4 mm
s := a*b = 8.2e-5 m^2
D_g-t := 2*(a + 2 mm) + 2*(b + 2 mm) = 0.057 m
D_t-w := 2*a + 2*b = 0.049 m
A_g-t := 1 mm*(D_out - D_in)/2 = 2.25e-5 m^2
A_t-w := s = 8.2e-5 m^2
V_n,g,exp := (1.0*V_n,g)[n] = 0.00176389 m^3/s
w_g,exp := V_g*V_n,g,exp*ρ_g = 0.0283502 kg/s
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ρ_w := 988*kg/m^3
w_w := w_w[n]*ρ_w = 0.960556 kg/s
ρ_t := 7850*kg/m^3
c_g := 0*J/(kg*K)
c_w := 4180*J/(kg*K)
c_t := 490*J/(kg*K)
h_g-t := 300*W/(m^2*K)
h_t-w := 6000*W/(m^2*K)
d_t := 0.5 mm
R_ts := 15000*W/(m^2*K)
15*W/(m*K)/(3 mm) = 5000 W/(m^2*K)
N := 1
k_tr := 1/(1/h_g-t + 1/R_ts + 1/h_t-w) = 280.374 W/(m^2*K)
Δl := L/N = 2.54469 m
p := 0.1 MPa
R_un := 8.314*J/(mol*K)
μ_g = 0.0256269 kg/mol
T_g,in = 1100 °C
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N_w,1_5 := 5
N_g,1_7 := 7
w_g,1 := w_g/N_g,1_7  # error: This variable is undefined.
w_w,1 := w_w/N_w,1_5 = 0.192111 kg/s
w_w,2 := w_w,1
w_w,3 := w_w,1
w_w,4 := w_w,1
w_w,5 := w_w,1
N_g,8_9 := 2
w_g,8 := w_g/N_g,8_9  # error: This variable is undefined.
w_g,9 := w_g/N_g,8_9  # error: This variable is undefined.
N_w,6_9 := 4
w_w,6 := w_w/N_w,6_9 = 0.240139 kg/s
w_w,7 := w_w/N_w,6_9 = 0.240139 kg/s
w_w,8 := w_w/N_w,6_9 = 0.240139 kg/s
w_w,9 := w_w/N_w,6_9 = 0.240139 kg/s
T_w,out,1_5 := T_supply[n] = 70 °C
T_w,in,6_9 := T_ret[n] = 59 °C
V_n,g := V_n,g,exp/(m^3/sec) = 0.00176389
T_g,out,1_5 := 0.99*T_g,in/K = 1359.42
T_g,out,6_7 := 0.98*T_g,in/K = 1345.69
T_g,in,8_9 := T_g,out,6_7 = 1345.69
T_g,out,8_9 := 0.99*T_g,in,8_9 = 1332.23
T_w,out,8_9 := 1.01*T_w,in,6_9/K = 335.471
T_w,out,6_7 := 1.01*T_w,in,6_9/K = 335.471
T_w,in,1_5 := T_w,out,6_7 = 335.471
T_g,in := T_g,in/K = 1373.15
k_tr,1_5 := 1000*W/(m^2*K)
k_tr,6_9 := 1000*W/(m^2*K)
Given
0*(c_g*p/(R_un/μ_g*T_g,out,1_5*K)*A_g-t*Δl) == V_n,g*m^3/sec/(N_g,1_7*N)*(I(T_g,in*K) - I(T_g,out,1_5*K)) - k_tr,1_5*D_g-t*Δl*(T_g,out,1_5*K - T_w,out,1_5)
0*(c_g*p/(R_un/μ_g*(T_g,out,6_7*K))*A_g-t*Δl) == V_n,g*m^3/sec/(N_g,1_7*N)*(I(T_g,in*K) - I(T_g,out,6_7*K)) - k_tr,1_5*D_g-t*Δl*(T_g,out,6_7*K - T_w,out,6_7*K)
w_w*c_w*(T_w,in,1_5*K) == 2*w_w,6*c_w*T_w,out,6_7*K + 2*w_w,8*c_w*T_w,out,8_9*K
0*(c_w*ρ_w*A_t-w*Δl) == w_w,1*c_w*(T_w,in,1_5*K - T_w,out,1_5) + k_tr,1_5*D_g-t*Δl*(T_g,out,1_5*K - T_w,out,1_5)
0*(c_w*ρ_w*A_t-w*Δl) == w_w,6*c_w*(T_w,in,6_9 - T_w,out,6_7*K) + k_tr,1_5*D_g-t*Δl*(T_g,out,6_7*K - T_w,out,6_7*K)
V_n,g*m^3/sec/N*I(T_g,in,8_9*K) == 5*V_n,g*m^3/sec/(N_g,1_7*N)*I(T_g,out,1_5*K) + 2*V_n,g*m^3/sec/(N_g,1_7*N)*I(T_g,out,6_7*K)
0*(c_g*p/(R_un/μ_g*(T_g,in,8_9*K))*A_g-t*Δl) == V_n,g*m^3/sec/(N_g,8_9*N)*(I(T_g,in,8_9*K) - I(T_g,out,8_9*K)) - k_tr,6_9*D_g-t*Δl*(T_g,out,8_9*K - T_w,out,8_9*K)
0*(c_w*ρ_w*A_t-w*Δl) == w_w,8*c_w*(T_w,in,6_9 - T_w,out,8_9*K) + k_tr,6_9*D_g-t*Δl*(T_g,out,8_9*K - T_w,out,8_9*K)
[V_n,g; T_g,out,1_5; T_g,out,6_7; T_g,in,8_9; T_g,out,8_9; T_w,in,1_5; T_w,out,6_7; T_w,out,8_9] := Find(V_n,g, T_g,out,1_5, T_g,out,6_7, T_g,in,8_9, T_g,out,8_9, T_w,in,1_5, T_w,out,6_7, T_w,out,8_9) = [0.00168711; 379.251; 373.681; 377.657; 361.573; 336.629; 337.394; 335.865]
V_n,g := V_n,g*m^3/sec = 0.00168711 m^3/s
T_g,out,1_5 := T_g,out,1_5*K = 379.251 K
T_g,out,6_7 := T_g,out,6_7*K = 373.681 K
T_g,in,8_9 := T_g,in,8_9*K = 377.657 K
T_g,out,8_9 := T_g,out,8_9*K = 361.573 K
T_w,out,8_9 := T_w,out,8_9*K = 335.865 K
V_n,g*m^3/sec*(I(T_g,in*K) - I(T_g,out,8_9*K)) == w_w*c_w*(T_w,out,1_5 - T_w,in,6_9)
T_w,out,6_7 := T_w,out,6_7*K = 337.394 K
T_w,in,1_5 := T_w,in,1_5*K = 336.629 K
T_g,in := T_g,in*K = 1373.15 K
T_supply[n] = 70 °C
T_g,in = 1100 °C
T_g,out,1_5 = 106.101 °C
T_w,out,1_5 = 70 °C
T_g,out,6_7 = 100.531 °C
T_w,in,1_5 = 63.4792 °C
T_g,in,8_9 = 104.507 °C
T_w,out,6_7 = 64.2435 °C
T_g,out,8_9 = 88.4227 °C
T_w,out,8_9 = 62.7148 °C
T_g,out[n] = 82 °C
T_w,in,6_9 := T_ret[n] = 59 °C
Q_g[n] = 46.4464 kW
V_n,g*(I(T_g,in) - I(T_g,out,8_9)) = 44.1663 kW
Q_w[n] = 44.1663 kW
w_w*c_w*(T_w,out,1_5 - T_w,in,6_9) = 44.1663 kW
V_n,g = 0.00168711 m^3/s
V_n,g = 6.07361 m^3/hr
V_n,g*(I(T_g,in) - I(T_g,out,8_9))/(Q_higher*V_n,g) = 70.9986 %
V_n,g*(I(T_g,in) - I(T_g,out,8_9))/(Q_lower*V_n,g) = 75.5516 %
V_n,g,exp = 0.00176389 m^3/s
V_n,g,exp = 6.35 m^3/hr
w_w*c_w*(T_w,out,1_5 - T_w,in,6_9)/(Q_higher*V_n,g) = 70.9986 %
w_w*c_w*(T_w,out,1_5 - T_w,in,6_9)/(Q_lower*V_n,g) = 75.5516 %
70.836
